# Worksheet setting: ORIGIN = 1
# header: Mathcad document to accompany paper " Design Aid for Selection of H-Piles" Copyright (c) 2023 Don Dotson MIT License
# Template to determine nominal compressive and bending strengths of Grade 50 HP sections
F_y := 50 ksi
F_u := 65 ksi
E := 29000 ksi
# Limiting value for compact/non-compact compression members subject to flexure (Table B4.1b)
# Limiting value for non-compact/slender compression members subject to flexure (Table B4.1b)
λ_pf := 0.38*sqrt(E/F_y) = 9.15161
λ_rf := 1.0*sqrt(E/F_y) = 24.0832
table  # each column defines a variable
    Index | Section | ASD (kip) | LRFD (kip) | A_g (in^2) | t_f (in) | b_f (in) | b_f2t_f | ht_w | t_w (in) | r_x (in) | Z_x | S_x | r_y (in) | Z_y | S_y
    1 | "HP8x36" | 317 | 477 | 10.6 | 0.445 | 8.16 | 9.16 | 14.2 | 0.445 | 3.36 | 33.6 | 29.8 | 1.95 | 15.2 | 9.88
    2 | "HP10x42" | 371 | 558 | 12.4 | 0.420 | 10.1 | 12.0 | 18.9 | 0.415 | 4.13 | 48.3 | 43.4 | 2.41 | 21.8 | 14.2
    3 | "HP10x57" | 500 | 751 | 16.7 | 0.565 | 10.2 | 9.03 | 13.9 | 0.565 | 4.18 | 66.5 | 58.8 | 2.45 | 30.3 | 19.7
    4 | "HP12x53" | 460 | 692 | 15.5 | 0.435 | 12.0 | 13.8 | 22.3 | 0.435 | 5.03 | 74 | 66.7 | 2.86 | 32.2 | 21.1
    5 | "HP12x63" | 551 | 828 | 18.4 | 0.515 | 12.1 | 11.8 | 18.9 | 0.515 | 5.06 | 88.3 | 79.1 | 2.88 | 38.7 | 25.3
    6 | "HP12x74" | 653 | 981 | 21.8 | 0.610 | 12.2 | 10.0 | 16.1 | 0.605 | 5.11 | 105 | 93.8 | 2.92 | 46.6 | 30.4
    7 | "HP12x84" | 737 | 1110 | 24.6 | 0.685 | 12.3 | 8.97 | 14.2 | 0.685 | 5.14 | 120 | 106.0 | 2.94 | 53.2 | 34.6
    8 | "HP12x89" | 775 | 1170 | 25.9 | 0.720 | 12.3 | 8.54 | 13.6 | 0.720 | 5.17 | 127 | 112.0 | 2.94 | 56.0 | 36.4
    9 | "HP12x102" | 895 | 1350 | 29.9 | 0.819 | 12.64 | 7.72 | 11.9 | 0.819 | 5.20 | 147.6 | 129.3 | 3.04 | 67.1 | 43.7
    10 | "HP12x117" | 1030 | 1550 | 34.4 | 0.929 | 12.87 | 6.93 | 10.4 | 0.929 | 5.24 | 170.8 | 148.2 | 3.11 | 79.3 | 51.4
    11 | "HP14x73" | 625 | 940 | 21.4 | 0.505 | 14.6 | 14.4 | 22.6 | 0.505 | 5.84 | 118 | 107 | 3.49 | 54.6 | 35.8
    12 | "HP14x89" | 781 | 1170 | 26.1 | 0.615 | 14.7 | 11.9 | 18.5 | 0.615 | 5.88 | 146 | 131 | 3.53 | 67.7 | 44.3
    13 | "HP14x102" | 901 | 1350 | 30.1 | 0.705 | 14.8 | 10.5 | 16.2 | 0.705 | 5.92 | 169 | 150 | 3.56 | 78.8 | 51.4
    14 | "HP14x117" | 1030 | 1550 | 34.4 | 0.805 | 14.9 | 9.25 | 14.2 | 0.805 | 5.96 | 194 | 172 | 3.59 | 91.4 | 59.5
    15 | "HP16x88" | 753 | 1130 | 25.8 | 0.540 | 15.7 | 14.5 | 22.0 | 0.540 | 6.56 | 161 | 145 | 3.68 | 68.2 | 44.5
    16 | "HP16x101" | 895 | 1350 | 29.9 | 0.625 | 15.8 | 12.6 | 19.0 | 0.625 | 6.59 | 187 | 168 | 3.71 | 80.1 | 52.2
    17 | "HP16x121" | 1070 | 1610 | 35.8 | 0.750 | 15.9 | 10.6 | 15.9 | 0.750 | 6.66 | 226 | 201 | 3.75 | 97.6 | 63.4
    18 | "HP16x141" | 1250 | 1880 | 41.7 | 0.875 | 16.0 | 9.14 | 13.6 | 0.875 | 6.70 | 264 | 234 | 3.79 | 116 | 74.9
    19 | "HP16x162" | 1430 | 2150 | 47.7 | 1.000 | 16.1 | 8.05 | 11.9 | 1.000 | 6.78 | 306 | 269 | 3.82 | 134 | 86.6
    20 | "HP16x183" | 1620 | 2430 | 54.1 | 1.130 | 16.3 | 7.21 | 10.5 | 1.130 | 6.81 | 349 | 304 | 3.89 | 156 | 100.0
    21 | "HP18x135" | 1190 | 1800 | 39.9 | 0.750 | 17.8 | 11.9 | 18.2 | 0.750 | 7.43 | 281 | 251 | 4.21 | 122 | 79.3
    22 | "HP18x157" | 1380 | 2080 | 46.2 | 0.870 | 17.9 | 10.3 | 15.6 | 0.870 | 7.46 | 327 | 290 | 4.25 | 143 | 93.1
    23 | "HP18x181" | 1590 | 2390 | 53.2 | 1.000 | 18.0 | 9.00 | 13.6 | 1.000 | 7.53 | 379 | 336 | 4.28 | 167 | 108
    24 | "HP18x204" | 1800 | 2710 | 60.2 | 1.130 | 18.1 | 8.01 | 12.1 | 1.130 | 7.60 | 433 | 380 | 4.31 | 191 | 124
end table
# The value of i corresponds to the row in the table above. To select a different HP section, change the value of i.
i := 1
Section[i] = "HP8x36"
# Note: AISC 360-22, Section F2 states that ALL HP shapes have compact webs at F_y ≤ 70*ksi. Checks of webs for compactness not required. Lateral-torsional buckling does not apply to embedded piles. Local buckling applies to non-compact and slender flanges.
# Chapter D - Tension
A_n := A_g[i] = 10.6 in^2
# For this calculation, assume that U := 1, i.e., the tension load is transmitted directly to each of the cross-sectional elements by fasteners or welds.
A_e := A_n*U = 10.6 in^2
F_y*A_g[i] = 530 kip  # Eq. D2-1
F_u*A_e = 689 kip  # Eq. D2-2
P_nt := min(F_y*A_g[i], F_u*A_e) = 530 kip  # lower value
# Chapter E - Compression
# 1. Check compression flange for slenderness:
L_c := 0 ft
L_c/r_y[i] = 0
4.71*sqrt(E/F_y) = 113.432
λ_r := 0.56*sqrt(E/F_y) = 13.4866  # Table B4.1a, Case 1
λ := b_f2t_f[i] = 9.16  # Tabulated
flange_check_comp[i] :=
    if b_f2t_f[i] ≤ λ_r
        "Non-slender"
    else
        "Slender"
    = "Non-slender"  # Checks the limiting value in Table B4.1a for non-slender/slender flanges
# E3. Flexural Buckling of Members Without Slender Elements
F_e :=
    if L_c ≤ 0 ft
        "NaN"
    else
        π^2*E/(L_c/r_y[i])^2
    = "NaN"
# Eq. E3-4, elastic buckling stress
# Eqs. E3-2 or E3-3
F_n :=
    if L_c ≤ 0 ft
        F_y
    else
        if L_c/r_y[i] ≤ 4.71*sqrt(E/F_y) or F_y/F_e ≤ 2.25
            (0.658^(F_y/F_e))*F_y
        else
            0.877*F_e
    = 50 ksi
P_n := F_n*A_g[i] = 530 kip  # Eq. E3-1, Compressive strength if element is non-slender. F_n is the nominal stress.
# E7. Members With Slender Elements
P_n == F_n*A_e  # Eq. E7-1, where A_eis the summation of the effective areas of the cross section based on reduced effective widths
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# H-Piles are not stiffened:
c_1 := 0.22
c_2 := 1.49
F_el := (c_2*λ_r/λ)^2*F_y = 240.633 ksi  # Eq. E7-5, elastic local buckling stress
b_e :=
    if λ ≤ λ_r*sqrt(F_y/F_n)
        b_f[i]
    else
        b_f[i]*(1 - c_1*sqrt(F_el/F_n))*sqrt(F_el/F_n)
    = 8.16 in  # Eqs. E7-2 or E7-3
(b_f[i] - b_e)*t_f[i] = 0 in^2
A_e := A_g[i] - 2*(b_f[i] - b_e)*t_f[i] = 10.6 in^2
# (Example area calculation from p. 77 of Companion to the AISC Steel Construction Manual, Vol. 1: Design Examples, v. 15.1
P_ncs := F_n*A_e = 530 kip  # Compressive strength if element is slender
P_nc :=
    if flange_check_comp[i] == "Non-slender"
        F_n*A_g[i]
    else
        F_n*A_e
    = 530 kip
# Chapter F - Design of Members for Flexure
# 1. Check slenderness and compactness of flange for flexure
λ[i] := b_f2t_f[i] = 9.16  # Tabulated above
0.38*sqrt(E/F_y) = 9.15161
1.0*sqrt(E/F_y) = 24.0832
h[i] := ht_w[i]*t_w[i] = 6.319 in
flange_check[i] :=
    if b_f2t_f[i] ≤ 0.38*sqrt(E/F_y)
        "Compact"
    else if 0.38*sqrt(E/F_y) ≤ b_f2t_f[i] < 1.0*sqrt(E/F_y)
        "Non-Compact"
    else
        "Slender"
    = "Non-Compact"
# Since LTB does not apply: F2.1 can be directly applied. Calculate strong and weak axis bending
M_px[i] := Z_x[i]*in^3*F_y = 140 kip*ft  # Strong-axis bending (Eq. F2-1)
k_c[i] :=
    if 4*sqrt(t_w[i]/h[i]) < 0.35
        0.35
    else if 4*sqrt(t_w[i]/h[i]) > 0.76
        0.76
    else
        4*sqrt(t_w[i]/h[i])
    = 0.76
# 2. Determine Strong-Axis Bending depending on flange condition as "Compact," "Non-Compact," or "Slender."
M_nx[i] :=
    if flange_check[i] == "Compact"
        M_px[i]
    else if flange_check[i] == "Non-Compact"
        M_px[i] - (M_px[i] - 0.7*in^3*F_y*S_x[i])*((λ[i] - λ_pf)/(λ_rf - λ_pf))
    else
        0.9*E*k_c[i]*S_x[i]*in^3/λ[i]^2
    = 139.97 kip*ft
# 3. Determine Weak-Axis Bending depending on flange condition as "Compact," "Non-Compact," or "Slender."
M_py[i] := Z_y[i]*in^3*F_y = 63.3333 kip*ft  # Weak-axis bending (Eq. F6-1)
M_ny[i] :=
    if flange_check[i] == "Compact"
        if M_py[i] ≤ 1.6*F_y*S_y[i]*in^3
            M_py[i]
        else
            1.6*F_y*S_y[i]*in^3
    else if flange_check[i] == "Non-Compact"
        M_py[i] - (M_py[i] - 0.7*in^3*F_y*S_y[i])*((λ[i] - λ_pf)/(λ_rf - λ_pf))
    else
        0.69*E*S_y[i]*in^3/b_f2t_f^2
    = 63.3139 kip*ft
# Calculates the nominal weak-axis bending moment based on whether the flange is compact, non-compact, or slender based on F6-1, F6-2, or F6-3
# Strong-Axis Bending Interaction Diagram
P_n := P_nc/kip = 530
# P(M_r)calculates the compression Strong-Axis bending strength.
P(M_r) :=
    if M_r ≤ 0.9*M_nx[i]
        P_n*(1 - 8/9*(M_r/M_nx[i]))
    else
        2*P_n*(1 - M_r/M_nx[i])
Section[i] = "HP8x36"  # Determine the x,y points on the interaction diagram
x_1 := 0
y_1 := P_n = 530
x_2 := 0.9*M_nx[i]/(kip*ft) = 125.973
y_2 := 0.2*P_n = 106
x_3 := M_nx[i]/(kip*ft) = 139.97
y_3 := 0
x_4 := 0.9*M_nx[i]/(kip*ft) = 125.973
y_4 := 0.2*(-P_nt/kip) = -106
x_5 := 0
y_5 := -P_nt/kip = -530
# Write OUTPUT data to Excel
Data := [Section[i], x_1, y_1, x_2, y_2, x_3, y_3, x_4, y_4, x_5, y_5]
Data = ["HP8x36", 0, 530, 125.973, 106, 139.97, 0, 125.973, -106, 0, -530]
index := num2str(i) = "1"
str1 := "Sheet1!A"
str2 := ":K"
out1 := concat(str1, index, str2, index) = "Sheet1!A1:K1"
out := WRITEEXCEL("strong_out.xlsx", Data, out1)
# Weak-Axis Bending Interaction Diagram
# P(M_r)calculates the compression Weak-Axis ASD bending strength (notice the subscript Ω).
P(M_r) :=
    if M_r ≤ 0.9*M_ny[i]
        P_n*(1 - 8/9*(M_r/M_ny[i]))
    else
        2*P_n*(1 - M_r/M_ny[i])
Section[i] = "HP8x36"  # Determine the x,y points on the interaction diagram
x_1 := 0
y_1 := P_n = 530
x_2 := 0.9*M_ny[i]/(kip*ft) = 56.9825
y_2 := 0.2*P_n = 106
x_3 := M_ny[i]/(kip*ft) = 63.3139
y_3 := 0
x_4 := 0.9*M_ny[i]/(kip*ft) = 56.9825
y_4 := 0.2*(-P_nt/kip) = -106
x_5 := 0
y_5 := -P_nt/kip = -530
# Write OUTPUT data to Excel
Weak_Data := [Section[i], x_1, y_1, x_2, y_2, x_3, y_3, x_4, y_4, x_5, y_5]
Weak_Data = ["HP8x36", 0, 530, 56.9825, 106, 63.3139, 0, 56.9825, -106, 0, -530]
index := num2str(i) = "1"
str1 := "Sheet1!A"
str2 := ":K"
out1 := concat(str1, index, str2, index) = "Sheet1!A1:K1"
out := WRITEEXCEL("weak_out.xlsx", Weak_Data, out1)
# Example
P_n := 530
M_nx := 140
P_nt := -530
x_1 := 0
y_1 := 530
x_2 := 0.9*M_nx = 126
y_2 := 0.2*P_n = 106
x_3 := M_nx = 140
y_4 := 0.2*P_nt = -106
x_5 := 0
y_5 := P_nt = -530
f(x) :=
    if x == 0
        P_n
    else if x > 0 and x ≤ 0.9*M_nx
        -0.8*P_n/(0.9*M_nx)*x + P_n
    else if x > 0.9*M_nx
        -0.2*P_n/(0.1*M_nx)*(x - 0.9*M_nx) + 0.2*P_n
f(90) = 227.143
g(x) :=
    if x == 0
        P_nt
    else if x > 0 and x ≤ 0.9*M_nx
        -0.8*P_nt/(0.9*M_nx)*x + P_nt
    else if x > 0.9*M_nx
        -0.2*P_nt/(0.1*M_nx)*(x - 0.9*M_nx) + 0.2*P_nt
x := 0 .. M_nx
# [chart]
    X[1] := x
    X[2] := x
    Y[1] := f(x)
    Y[2] := g(x)
